*Heading
** Job name: 3PointBend Model name: Model-1
** Generated by: Abaqus/CAE 2019
*Preprint, echo=NO, model=NO, history=NO, contact=NO
**
** PARTS
**
*Part, name=Battery
*Node
      1,          90.,           0.,           0.
      2,           0.,           0.,           0.
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*Element, type=C3D8R
  1,  357,  178,  177,  221, 1257, 1078, 1077, 1121
  2,  174,  222,  546,  175, 1074, 1122, 1446, 1075
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*Nset, nset=Batset, generate
    1,  1800,     1
*Elset, elset=Batset, generate
   1,  805,    1
*Elset, elset=_BatTop_S2, internal, generate
   1,  805,    1
*Surface, type=ELEMENT, name=BatTop
_BatTop_S2, S2
*Elset, elset=_BatBot_S1, internal, generate
   1,  805,    1
*Surface, type=ELEMENT, name=BatBot
_BatBot_S1, S1
*Orientation, name=Ori-1
1., 0., 0., 0., 1., 0.
3, 0.
** Section: BatOrtho
*Solid Section, elset=Batset, orientation=Ori-1, material=BatOrtho
,
*End Part
**
*Part, name=CF
*Node
      1,           0.,           0.,           1.
      2,           0.,   3.85714293,           1.
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*Element, type=C3D8R
  1,   61,   62,   92,   91,    1,    2,   32,   31
  2,   62,   63,   93,   92,    2,    3,   33,   32
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*Nset, nset=CFset, generate
    1,  1740,     1
*Elset, elset=CFset, generate
   1,  812,    1
*Elset, elset=_CFtop_S3, internal, generate
   1,  812,    1
*Surface, type=ELEMENT, name=CFtop
_CFtop_S3, S3
*Elset, elset=_CFbot_S5, internal, generate
   1,  812,    1
*Surface, type=ELEMENT, name=CFbot
_CFbot_S5, S5
*Orientation, name=Ori-2
          0.,           1.,           0.,           1.,           0.,           0.
3, 0.
** Region: (CompositeLayup-1: Generated From Layup)
*Elset, elset=CompositeLayup-1, generate
   1,  812,    1
** Section: CompositeLayup-1
*Solid Section, elset=CompositeLayup-1, composite, orientation=Ori-2, stack direction=3, layup=CompositeLayup
0.5, 1, CF, 0., Ply-1
0.5, 1, CF, 90., Ply-2
0.5, 1, CF, 90., Ply-3
0.5, 1, CF, 0., Ply-4
*End Part
**
*Part, name=Polymer
*Node
      1,         100.,          10.,           0.
      2,         100.,         100.,           0.
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*Element, type=C3D8R
  1,   61, 1192, 1193,   62,  325, 1594, 1595,  324
  2, 1195,   64,   63, 1194, 1597,  322,  323, 1596
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*Nset, nset=PolySet, generate
    1,  1930,     1
*Elset, elset=PolySet, generate
   1,  735,    1
*Elset, elset=_PolyTop_S2, internal
   1,   2,   3,   4,   5,   6
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*Elset, elset=_PolyTop_S1, internal, generate
 537,  721,    1
*Surface, type=ELEMENT, name=PolyTop
_PolyTop_S2, S2
_PolyTop_S1, S1
*Elset, elset=_PolyBot_S1, internal
   1,   2,   3,   4,   5,   6
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*Elset, elset=_PolyBot_S2, internal, generate
 537,  721,    1
*Surface, type=ELEMENT, name=PolyBot
_PolyBot_S1, S1
_PolyBot_S2, S2
*Elset, elset=_PolyInside_S5, internal
  97, 115, 118, 198, 199, 239, 247
*Elset, elset=_PolyInside_S6, internal
  98, 102, 105, 112, 113, 126, 130, 134, 137, 202, 241, 242, 246, 511
*Elset, elset=_PolyInside_S4, internal
 103, 114, 119, 122, 243, 244, 245, 501
*Elset, elset=_PolyInside_S3, internal
 240,
*Surface, type=ELEMENT, name=PolyInside
_PolyInside_S5, S5
_PolyInside_S6, S6
_PolyInside_S4, S4
_PolyInside_S3, S3
** Section: PolySec
*Solid Section, elset=PolySet, material=Polymer
,
*End Part
**
**
** ASSEMBLY
**
*Assembly, name=Assembly
**
*Instance, name=CF-1, part=CF
*End Instance
**
*Instance, name=Battery-1, part=Battery
         10.,          10.,          -3.
*End Instance
**
*Instance, name=Polymer-1, part=Polymer
          0.,           0.,          -3.
*End Instance
**
*Instance, name=CF-2, part=CF
          0.,           0.,          -4.
*End Instance
**
*Node
      1,          55.,          55.,           1.
*Nset, nset=BCedges, instance=CF-2
   31,   60,   91,  120,  151,  180
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*Elset, elset=BCedges, instance=CF-2
   1,  29,  30,  58,  59,  87
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*Nset, nset=LoadSet, instance=CF-1
   15,   16,   75,   76,  135,  136
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*Elset, elset=LoadSet, instance=CF-1, generate
  15,  798,   29
*Nset, nset=_PickedSet13, internal
 1,
*Elset, elset=_LoadSurf_S3, internal, instance=CF-1, generate
  15,  798,   29
*Surface, type=ELEMENT, name=LoadSurf
_LoadSurf_S3, S3
** Constraint: CF1Poly
*Tie, name=CF1Poly, adjust=yes
Polymer-1.PolyTop, CF-1.CFbot
** Constraint: PolyCF2
*Tie, name=PolyCF2, adjust=yes
CF-2.CFtop, Polymer-1.PolyBot
** Constraint: RigidDeform
*Rigid Body, ref node=_PickedSet13, tie nset=LoadSet
*End Assembly
**
** MATERIALS
**
*Material, name=BatOrtho
*Elastic, type=ENGINEERING CONSTANTS
1090., 109., 500., 0.15, 0.15, 0.15, 474., 474.
 474.,
*Material, name=CF
*Elastic, type=ENGINEERING CONSTANTS
30420.,  4023.,  4023.,   0.29,   0.29, 0.3928,  2081.,  2081.
  1440.,
*Material, name=Polymer
*Elastic
500., 0.3
**
** INTERACTION PROPERTIES
**
*Surface Interaction, name=NormCont
1.,
*Friction, slip tolerance=0.005
 0.3,
*Surface Behavior, pressure-overclosure=HARD
**
** BOUNDARY CONDITIONS
**
** Name: Pin Type: Displacement/Rotation
*Boundary
BCedges, 3, 3
**
** INTERACTIONS
**
** Interaction: CF1Bat
*Contact Pair, interaction=NormCont, type=SURFACE TO SURFACE
Battery-1.BatTop, CF-1.CFbot
** Interaction: CF2Bat
*Contact Pair, interaction=NormCont, type=SURFACE TO SURFACE
CF-2.CFtop, Battery-1.BatBot
** ----------------------------------------------------------------
**
** STEP: Loading
**
*Step, name=Loading, nlgeom=NO
*Static
1., 1., 1e-05, 1.
**
** LOADS
**
** Name: Pressure   Type: Pressure
*Dsload
LoadSurf, P, 2.27273
**
** OUTPUT REQUESTS
**
*Restart, write, frequency=0
**
** FIELD OUTPUT: F-Output-1
**
*Output, field
*Node Output
U, UR, UT
**
** HISTORY OUTPUT: H-Output-1
**
*Output, history, variable=PRESELECT
*End Step
