*Heading
** Job name: Job-6 Model name: Model-1
** Generated by: Abaqus/CAE 2019
*Preprint, echo=NO, model=NO, history=NO, contact=NO
**
** PARTS
**
*Part, name=Battery
*Node
      1,   16.8178654,   84.2419891,           0.
      2,   14.7988596,    86.260994,           0.
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*Element, type=C3D8R
   1,  225, 1017,  274, 1020, 1327, 2119, 1376, 2122
   2,  131,  130,  225,    4, 1233, 1232, 1327, 1106
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*Nset, nset=Batset, generate
    1,  3306,     1
*Elset, elset=Batset, generate
    1,  2024,     1
*Elset, elset=_BatTop_S2, internal, generate
 1013,  2024,     1
*Surface, type=ELEMENT, name=BatTop
_BatTop_S2, S2
*Elset, elset=_BatBot_S1, internal, generate
    1,  1012,     1
*Surface, type=ELEMENT, name=BatBot
_BatBot_S1, S1
*Elset, elset=_Battery-rivet-0_S4, internal
    7,   96,  106,  177,  197,  200,  305, 1019, 1108, 1118, 1189, 1209, 1212, 1317
*Elset, elset=_Battery-rivet-0_S3, internal
   11,   14, 1023, 1026
*Elset, elset=_Battery-rivet-0_S5, internal
   15,   64,   85,  102,  198,  203, 1027, 1076, 1097, 1114, 1210, 1215
*Elset, elset=_Battery-rivet-0_S6, internal
   26,  105,  107,  109,  193, 1038, 1117, 1119, 1121, 1205
*Surface, type=ELEMENT, name=Battery-rivet-0
_Battery-rivet-0_S4, S4
_Battery-rivet-0_S3, S3
_Battery-rivet-0_S6, S6
_Battery-rivet-0_S5, S5
*Elset, elset=_Battery-rivet-1_S3, internal
   30,  226,  259,  262, 1042, 1238, 1271, 1274
*Elset, elset=_Battery-rivet-1_S5, internal
   36,  261,  298, 1048, 1273, 1310
*Elset, elset=_Battery-rivet-1_S6, internal
   52,  167,  173, 1064, 1179, 1185
*Elset, elset=_Battery-rivet-1_S4, internal
  126,  172,  176,  295,  299,  300, 1138, 1184, 1188, 1307, 1311, 1312
*Surface, type=ELEMENT, name=Battery-rivet-1
_Battery-rivet-1_S3, S3
_Battery-rivet-1_S5, S5
_Battery-rivet-1_S6, S6
_Battery-rivet-1_S4, S4
*Elset, elset=_Battery-rivet-2_S3, internal
   12,   17,   32, 1024, 1029, 1044
*Elset, elset=_Battery-rivet-2_S4, internal
   13,   37,  163,  171,  175,  178, 1025, 1049, 1175, 1183, 1187, 1190
*Elset, elset=_Battery-rivet-2_S5, internal
   16,   34,   35,   48,   49,  162,  164, 1028, 1046, 1047, 1060, 1061, 1174, 1176
*Elset, elset=_Battery-rivet-2_S6, internal
   79,  143, 1091, 1155
*Surface, type=ELEMENT, name=Battery-rivet-2
_Battery-rivet-2_S3, S3
_Battery-rivet-2_S4, S4
_Battery-rivet-2_S6, S6
_Battery-rivet-2_S5, S5
*Elset, elset=_Battery-rivet-3_S3, internal
    9,   10,  181, 1021, 1022, 1193
*Elset, elset=_Battery-rivet-3_S5, internal
   27,  189, 1039, 1201
*Elset, elset=_Battery-rivet-3_S4, internal
   28,  113,  192, 1040, 1125, 1204
*Elset, elset=_Battery-rivet-3_S6, internal
   47,  115,  118,  187, 1059, 1127, 1130, 1199
*Surface, type=ELEMENT, name=Battery-rivet-3
_Battery-rivet-3_S3, S3
_Battery-rivet-3_S5, S5
_Battery-rivet-3_S4, S4
_Battery-rivet-3_S6, S6
*Orientation, name=Ori-1
1., 0., 0., 0., 1., 0.
3, 0.
** Section: BatOrtho
*Solid Section, elset=Batset, orientation=Ori-1, material=BatOrtho
,
*End Part
**
*Part, name=CF
*Node
      1,         52.5,           0.,           0.
      2,         52.5,         110.,           0.
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*Element, type=S4R
  1,   1,   9, 223, 114
  2,   9,  10, 224, 223
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*Nset, nset=CF_set, generate
    1,  1482,     1
*Elset, elset=CF_set, generate
    1,  1406,     1
*Elset, elset=_CFtop_SPOS, internal, generate
    1,  1406,     1
*Surface, type=ELEMENT, name=CFtop
_CFtop_SPOS, SPOS
*Elset, elset=_CFbot_SNEG, internal, generate
    1,  1406,     1
*Surface, type=ELEMENT, name=CFbot
_CFbot_SNEG, SNEG
** Section: CF_sec
*Shell Section, elset=CF_set, composite
0.2, 3, CF_material, 0.
0.2, 3, CF_material, 90.
0.2, 3, CF_material, 90.
0.2, 3, CF_material, 0.
*End Part
**
*Part, name=Polymer
*Node
      1,   52.1050682,   67.0628662,           0.
      2,   52.1050682,   67.0628662,           5.
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*Element, type=C3D8R
 1, 2059,  757,  756, 2032,  705,   40,   39,  678
 2, 2040,  755,  754, 2056,  686,   38,   37,  702
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*Nset, nset=PolySet
    5,    6,    7,    8,    9,   10
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*Elset, elset=PolySet, generate
  169,  1240,     1
*Nset, nset=_PickedSet12, internal
    3,    4,   59,   60,   61,   62
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*Elset, elset=_PickedSet12, internal, generate
  81,  168,    1
*Nset, nset=_PickedSet17, internal
   21,   22,  625,  626,  627,  628
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*Elset, elset=_PickedSet17, internal, generate
 1241,  1302,     1
*Nset, nset=_PickedSet22, internal
    1,    2,   25,   26,   27,   28
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*Elset, elset=_PickedSet22, internal, generate
  1,  80,   1
*Nset, nset=_PickedSet27, internal
   23,   24,  655,  656,  657,  658
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*Elset, elset=_PickedSet27, internal, generate
 1303,  1354,     1
*Elset, elset=_PolyTop_S2, internal, generate
  705,  1240,     1
*Surface, type=ELEMENT, name=PolyTop
_PolyTop_S2, S2
*Elset, elset=_PolyBot_S1, internal, generate
 169,  704,    1
*Surface, type=ELEMENT, name=PolyBot
_PolyBot_S1, S1
*Elset, elset=_Polymer-rivet-0_S3, internal
  81,  94, 123, 125, 138, 167
*Elset, elset=_Polymer-rivet-0_S6, internal
  82,  88,  96, 100, 103, 104, 126, 132, 140, 144, 147, 148
*Elset, elset=_Polymer-rivet-0_S5, internal
  91,  95, 101, 102, 110, 135, 139, 145, 146, 154
*Elset, elset=_Polymer-rivet-0_S4, internal
  97,  98,  99, 105, 106, 121, 141, 142, 143, 149, 150, 165
*Surface, type=ELEMENT, name=Polymer-rivet-0
_Polymer-rivet-0_S3, S3
_Polymer-rivet-0_S6, S6
_Polymer-rivet-0_S4, S4
_Polymer-rivet-0_S5, S5
*Elset, elset=_Polymer-rivet-top-0_S1, internal, generate
 125,  168,    1
*Surface, type=ELEMENT, name=Polymer-rivet-top-0
_Polymer-rivet-top-0_S1, S1
*Elset, elset=_Polymer-rivet-bot-0_S2, internal, generate
  81,  124,    1
*Surface, type=ELEMENT, name=Polymer-rivet-bot-0
_Polymer-rivet-bot-0_S2, S2
*Elset, elset=_Polymer-rivet-1_S3, internal
 1241, 1245, 1248, 1259, 1269, 1272, 1276, 1279, 1290, 1300
*Elset, elset=_Polymer-rivet-1_S5, internal
 1242, 1261, 1273, 1292
*Elset, elset=_Polymer-rivet-1_S4, internal
 1244, 1249, 1253, 1254, 1255, 1256, 1271, 1275, 1280, 1284, 1285, 1286, 1287, 1302
*Elset, elset=_Polymer-rivet-1_S6, internal
 1257, 1258, 1288, 1289
*Surface, type=ELEMENT, name=Polymer-rivet-1
_Polymer-rivet-1_S3, S3
_Polymer-rivet-1_S5, S5
_Polymer-rivet-1_S4, S4
_Polymer-rivet-1_S6, S6
*Elset, elset=_Polymer-rivet-top-1_S1, internal, generate
 1272,  1302,     1
*Surface, type=ELEMENT, name=Polymer-rivet-top-1
_Polymer-rivet-top-1_S1, S1
*Elset, elset=_Polymer-rivet-bot-1_S2, internal, generate
 1241,  1271,     1
*Surface, type=ELEMENT, name=Polymer-rivet-bot-1
_Polymer-rivet-bot-1_S2, S2
*Elset, elset=_Polymer-rivet-2_S4, internal
  1,  2, 17, 18, 19, 20, 28, 41, 42, 57, 58, 59, 60, 68
*Elset, elset=_Polymer-rivet-2_S6, internal
  4, 29, 38, 44, 69, 78
*Elset, elset=_Polymer-rivet-2_S5, internal
  6, 10, 16, 23, 24, 46, 50, 56, 63, 64
*Elset, elset=_Polymer-rivet-2_S3, internal
  9, 15, 37, 49, 55, 77
*Surface, type=ELEMENT, name=Polymer-rivet-2
_Polymer-rivet-2_S4, S4
_Polymer-rivet-2_S6, S6
_Polymer-rivet-2_S5, S5
_Polymer-rivet-2_S3, S3
*Elset, elset=_Polymer-rivet-top-2_S1, internal, generate
 41,  80,   1
*Surface, type=ELEMENT, name=Polymer-rivet-top-2
_Polymer-rivet-top-2_S1, S1
*Elset, elset=_Polymer-rivet-bot-2_S2, internal, generate
  1,  40,   1
*Surface, type=ELEMENT, name=Polymer-rivet-bot-2
_Polymer-rivet-bot-2_S2, S2
*Elset, elset=_Polymer-rivet-3_S3, internal
 1304, 1315, 1321, 1322, 1330, 1341, 1347, 1348
*Elset, elset=_Polymer-rivet-3_S6, internal
 1306, 1316, 1323, 1325, 1326, 1332, 1342, 1349, 1351, 1352
*Elset, elset=_Polymer-rivet-3_S5, internal
 1310, 1317, 1319, 1336, 1343, 1345
*Surface, type=ELEMENT, name=Polymer-rivet-3
_Polymer-rivet-3_S3, S3
_Polymer-rivet-3_S6, S6
_Polymer-rivet-3_S5, S5
*Elset, elset=_Polymer-rivet-top-3_S1, internal, generate
 1329,  1354,     1
*Surface, type=ELEMENT, name=Polymer-rivet-top-3
_Polymer-rivet-top-3_S1, S1
*Elset, elset=_Polymer-rivet-bot-3_S2, internal, generate
 1303,  1328,     1
*Surface, type=ELEMENT, name=Polymer-rivet-bot-3
_Polymer-rivet-bot-3_S2, S2
** Section: PolySec
*Solid Section, elset=_PickedSet22, material=Polymer
,
** Section: PolySec
*Solid Section, elset=_PickedSet12, material=Polymer
,
** Section: PolySec
*Solid Section, elset=PolySet, material=Polymer
,
** Section: PolySec
*Solid Section, elset=_PickedSet17, material=Polymer
,
** Section: PolySec
*Solid Section, elset=_PickedSet27, material=Polymer
,
*End Part
**
**
** ASSEMBLY
**
*Assembly, name=Assembly
**
*Instance, name=Polymer-1, part=Polymer
*End Instance
**
*Instance, name=Battery-1, part=Battery
         10.,          10.,           0.
*End Instance
**
*Instance, name=CF-1, part=CF
          0.,           0.,         -0.4
*End Instance
**
*Instance, name=CF-2, part=CF
          0.,           0.,          5.4
*End Instance
**
*Node
      1,          55.,          55.,    5.4000001
*Nset, nset=VerticalSupport, instance=CF-1
   3,   4,   7,   8,  62,  63
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*Elset, elset=VerticalSupport, instance=CF-1
  630,  631,  632,  633,  634,  635
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*Nset, nset=XDirSupport, instance=CF-1
 3,
*Nset, nset=YDirSupport, instance=CF-1
 7,
*Nset, nset=rigid_loading_set, instance=CF-2
   1,   2,   5,   6,   9,  10
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*Elset, elset=rigid_loading_set, instance=CF-2, generate
 667,  740,    1
*Nset, nset=_PickedSet14, internal
 1,
*Elset, elset=__PickedSurf15_SPOS, internal, instance=CF-2, generate
 667,  740,    1
*Surface, type=ELEMENT, name=_PickedSurf15, internal
__PickedSurf15_SPOS, SPOS
** Constraint: BatPoly-0
*Tie, name=BatPoly-0, adjust=no, position tolerance=1.
Battery-1.Battery-rivet-0, Polymer-1.Polymer-rivet-0
** Constraint: BatPoly-1
*Tie, name=BatPoly-1, adjust=no, position tolerance=1.
Battery-1.Battery-rivet-1, Polymer-1.Polymer-rivet-1
** Constraint: BatPoly-2
*Tie, name=BatPoly-2, adjust=no, position tolerance=1.
Battery-1.Battery-rivet-2, Polymer-1.Polymer-rivet-2
** Constraint: BatPoly-3
*Tie, name=BatPoly-3, adjust=no, position tolerance=1.
Battery-1.Battery-rivet-3, Polymer-1.Polymer-rivet-3
** Constraint: CF1Poly
*Tie, name=CF1Poly, adjust=no, position tolerance=1.
Polymer-1.PolyBot, CF-1.CFtop
** Constraint: CF1Poly-Rivet-0
*Tie, name=CF1Poly-Rivet-0, adjust=no, position tolerance=1.
Polymer-1.Polymer-rivet-bot-0, CF-1.CFtop
** Constraint: CF1Poly-Rivet-1
*Tie, name=CF1Poly-Rivet-1, adjust=no, position tolerance=1.
Polymer-1.Polymer-rivet-bot-1, CF-1.CFtop
** Constraint: CF1Poly-Rivet-2
*Tie, name=CF1Poly-Rivet-2, adjust=no, position tolerance=1.
Polymer-1.Polymer-rivet-bot-2, CF-1.CFtop
** Constraint: CF1Poly-Rivet-3
*Tie, name=CF1Poly-Rivet-3, adjust=no, position tolerance=1.
Polymer-1.Polymer-rivet-bot-3, CF-1.CFtop
** Constraint: CF2Poly
*Tie, name=CF2Poly, adjust=no, position tolerance=1.
Polymer-1.PolyTop, CF-2.CFbot
** Constraint: CF2Poly-Rivet-0
*Tie, name=CF2Poly-Rivet-0, adjust=no, position tolerance=1.
Polymer-1.Polymer-rivet-top-0, CF-2.CFbot
** Constraint: CF2Poly-Rivet-1
*Tie, name=CF2Poly-Rivet-1, adjust=no, position tolerance=1.
Polymer-1.Polymer-rivet-top-1, CF-2.CFbot
** Constraint: CF2Poly-Rivet-2
*Tie, name=CF2Poly-Rivet-2, adjust=no, position tolerance=1.
Polymer-1.Polymer-rivet-top-2, CF-2.CFbot
** Constraint: CF2Poly-Rivet-3
*Tie, name=CF2Poly-Rivet-3, adjust=no, position tolerance=1.
Polymer-1.Polymer-rivet-top-3, CF-2.CFbot
** Constraint: LoadingRigidBody
*Rigid Body, ref node=_PickedSet14, tie nset=rigid_loading_set
*End Assembly
**
** MATERIALS
**
*Material, name=BatOrtho
*Elastic, type=ENGINEERING CONSTANTS
1090., 109., 500., 0.15, 0.15, 0.15, 474., 474.
 474.,
*Material, name=CF_material
*Elastic, type=ENGINEERING CONSTANTS
30420.,  4023.,  4023.,   0.29,   0.29, 0.3928,  2081.,  2081.
  1440.,
*Material, name=Polymer
*Elastic
500., 0.3
**
** INTERACTION PROPERTIES
**
*Surface Interaction, name=NormCont
1.,
*Friction, slip tolerance=0.005
 0.3,
*Surface Behavior, pressure-overclosure=HARD
**
** INTERACTIONS
**
** Interaction: CF1Bat
*Contact Pair, interaction=NormCont, type=SURFACE TO SURFACE
Battery-1.BatBot, CF-1.CFtop
** Interaction: CF2Bat
*Contact Pair, interaction=NormCont, type=SURFACE TO SURFACE
Battery-1.BatTop, CF-2.CFbot
** ----------------------------------------------------------------
**
** STEP: Loading
**
*Step, name=Loading, nlgeom=NO
*Static
1., 1., 1e-05, 1.
**
** BOUNDARY CONDITIONS
**
** Name: VerticalSupport Type: Displacement/Rotation
*Boundary
VerticalSupport, 3, 3
** Name: XDirSupport Type: Displacement/Rotation
*Boundary
XDirSupport, 1, 1
** Name: YDirSupport Type: Displacement/Rotation
*Boundary
YDirSupport, 2, 2
**
** LOADS
**
** Name: Load-1   Type: Pressure
*Dsload
_PickedSurf15, P, 0.181818
**
** OUTPUT REQUESTS
**
*Restart, write, frequency=0
**
** FIELD OUTPUT: F-Output-1
**
*Output, field
*Node Output
U, UR, UT
*Element Output, directions=YES
EVOL,
**
** HISTORY OUTPUT: H-Output-1
**
*Output, history, variable=PRESELECT
*End Step
